// COMSOL Multiphysics 6.0.0.405 model "Eigenfrequency_30_b.mph"
// Outline of the model tree

Parameters
  rho = 700
  E_xx = 1e10
  E_yy = 2e9
  E_zz = 1.2e9
  mu_xy = 0.375
  mu_xz = 0.48
  mu_yz = 0.47
  G_xy = 1600e9
  G_xz = 1600e9
  G_yz = 720e9

Common definitions
  mpf1: ParticipationFactors

Geometry
  geom1 "Geometry 1" (3D, length unit m)
    imp1: Import | type = cad; filename = Bridge Models\Param cello bridge - 30.sat; importtol = 1.0E-6
    fin: Finalize "Form Union"

Physics
  solid: SolidMechanics on all domains
    dependent variable u = {u, v, w}
    lemm1: LinearElasticModel "Linear Elastic Material 1" (default)
      SolidModel = Orthotropic
      Evector_mat = userdef
      Evector = {E_xx, E_yy, E_zz}
      nuvector_mat = userdef
      nuvector = {mu_xy, mu_yz, mu_xz}
      Gvector_mat = userdef
      Gvector = {G_xy, G_yz, G_xz}
      rho_mat = userdef
      rho = rho
    free1: Free (default)
    init1: init "Initial Values 1" (default)
    fix1: Fixed "Fixed Constraint 1" on boundaries 2, 27

Mesh
  mesh1 "Mesh 1" (physics-controlled)
    size: MeshSizeDefault | hauto = 2

Studies
  std1 "Study 1"
    eig: Eigenfrequency | neigs = 10; shift = 100[Hz]; eigwhich = lr; conrad = 1

Solver configurations
  sol1 "Solution 1" (study std1)
    v1: Variables "Dependent Variables 1"
    e1: Eigenvalue "Eigenvalue Solver 1" | eigvfunscale = maximum; eigvfunscaleparam = 1.35E-7
      dDef: Direct

Datasets
  dset1: Solution | solution = sol1

Evaluation groups
  std1EvgFrq: EvaluationGroup "Eigenfrequencies (Study 1)" | data = dset1
    gev1: EvalGlobal "Global Evaluation 1"
      expr = {freq*2*pi, imag(freq)/abs(freq), abs(freq)/imag(freq)/2}
      unit = {rad/s, 1, 1}
      descr = {Angular frequency, Damping ratio, Quality factor}
  std1mpf1: EvaluationGroup "Participation Factors (Study 1)" | data = dset1
    gev1: EvalGlobal "Global Evaluation 1"
      expr = {mpf1.pfLnormX, mpf1.pfLnormY, mpf1.pfLnormZ, mpf1.pfRnormX, mpf1.pfRnormY, mpf1.pfRnormZ, mpf1.mEffLX, mpf1.mEffLY, mpf1.mEffLZ, mpf1.mEffRX, mpf1.mEffRY, mpf1.mEffRZ}
      unit = {1, 1, 1, 1, 1, 1, kg, kg, kg, kg*m^2, kg*m^2, kg*m^2}
      descr = {"Participation factor, normalized, X-translation", "Participation factor, normalized, Y-translation", "Participation factor, normalized, Z-translation", "Participation factor, normalized, X-rotation", "Participation factor, normalized, Y-rotation", "Participation factor, normalized, Z-rotation", "Effective modal mass, X-translation", "Effective modal mass, Y-translation", "Effective modal mass, Z-translation", "Effective modal mass, X-rotation", "Effective modal mass, Y-rotation", "Effective modal mass, Z-rotation"}

Plots
  pg1: PlotGroup3D "Mode Shape (solid)" | data = dset1
    surf1: Surface | data = dset1; expr = solid.disp
      def: Deform "Deformation" | expr = {u, v, w}; descr = Displacement field

Exports
  data1: Data | data = dset1; expr = comp1.solid.freq; descr = Frequency
  anim1: Animation
    movietype = avi
    avifilename = C:\Users\laura\Videos\Shotcut edits\Fixed30mode10.avi
    sweeptype = dde
    maxframes = 10
    width = 960
    height = 1080