// COMSOL Multiphysics 6.0.0.405 model "FRF_30t.mph"
// Outline of the model tree

Parameters
  rho = 700
  E_xx = 1e10
  E_yy = 2e9
  E_zz = 1.2e9
  mu_xy = 0.375
  mu_xz = 0.48
  mu_yz = 0.47
  G_xy = 1600e9
  G_xz = 1600e9
  G_yz = 720e9
  x_plane = 0.0225
  xj = 0.012
  yj = -0.051
  zj = 0.004

Selections
  sel1: Explicit "feet surfaces" on no boundaries
  sel2: Explicit "force surface" on no boundaries

Common definitions
  mpf1: ParticipationFactors

Geometry
  geom1 "Geometry 1" (3D, length unit m)
    imp1: Import | type = cad; filename = Bridge Models\Param cello bridge - 30.sat; importtol = 1.0E-6
    wp1: WorkPlane "IV string inner" | quickplane = yz; quickx = x_plane; unite = on
    wp2: WorkPlane "IV string outer" | quickplane = yz; quickx = x_plane + 0.0015; unite = on
    wp3: WorkPlane "III string inner" | quickplane = yz; quickx = x_plane/3; unite = on
    wp4: WorkPlane "III string outer" | quickplane = yz; quickx = x_plane/3+0.0015; unite = on
    wp5: WorkPlane "II string inner" | quickplane = yz; quickx = -x_plane/3; unite = on
    wp6: WorkPlane "II string outer" | quickplane = yz; quickx = -(x_plane/3+0.0015); unite = on
    wp7: WorkPlane "I string inner" | quickplane = yz; quickx = -(x_plane); unite = on
    wp8: WorkPlane "I string outer" | quickplane = yz; quickx = -(x_plane+0.0015); unite = on
    parf1: PartitionFaces | face = imp1(1) boundaries 12; partitionwith = workplane; workplane = wp1
    parf2: PartitionFaces | face = parf1(1) boundaries 28; partitionwith = workplane; workplane = wp2
    parf3: PartitionFaces | face = parf2(1) boundaries 12; partitionwith = workplane; workplane = wp3
    parf4: PartitionFaces | face = parf3(1) boundaries 23; partitionwith = workplane; workplane = wp4
    parf5: PartitionFaces | face = parf4(1) boundaries 12; partitionwith = workplane; workplane = wp5
    parf6: PartitionFaces | face = parf5(1) boundaries 12; partitionwith = workplane; workplane = wp6
    parf7: PartitionFaces | face = parf6(1) boundaries 12; partitionwith = workplane; workplane = wp7
    parf8: PartitionFaces | face = parf7(1) boundaries 12; partitionwith = workplane; workplane = wp8
    cyl1: Cylinder (disabled) | pos = {0.012, -0.051, 0.004}; r = 0.0001; h = 0.01
    ls1: LineSegment
      specify1 = coord
      coord1 = {xj-0.0015, yj, zj}
      specify2 = coord
      coord2 = {xj-0.0015, yj, zj+0.002}
    int1: Intersection | input = ls1, parf8; keep = on; intbnd = off; face = all
    del1: Delete "Delete Entities 1" | input = ls1
    fin: Finalize "Form Union"

Physics
  solid: SolidMechanics on all domains
    dependent variable u = {u, v, w}
    lemm1: LinearElasticModel "Linear Elastic Material 1" (default)
      SolidModel = Orthotropic
      Evector_mat = userdef
      Evector = {E_xx, E_yy, E_zz}
      nuvector_mat = userdef
      nuvector = {mu_xy, mu_yz, mu_xz}
      Gvector_mat = userdef
      Gvector = {G_xy, G_yz, G_xz}
      rho_mat = userdef
      rho = rho
    free1: Free (default)
    init1: init "Initial Values 1" (default)
    fix1: Fixed "Fixed Constraint 1" on boundaries 2, 33
    bndl2: BoundaryLoad on boundaries 27
      LoadType = TotalForce
      Ftot = {0, 1, 0}
      FperArea = {1, 0, 0}
      coordinateSystem = sys1
      harmonicPerturbation = 0
    bndl1: BoundaryLoad (disabled) on boundaries 15, 20, 27, 34
      LoadType = TotalForce
      Ftot = {0, -1, 0}
      FperArea = {0, -1, 0}

Mesh
  mesh1 "Mesh 1" (physics-controlled)
    size: MeshSizeDefault | hauto = 2

Studies
  std3 "Study 3"
    freq: Frequency "Frequency Domain" | plist = range(100,5,4500)

Solver configurations
  sol3 "Solution 3" (study std3)
    v1: Variables "Dependent Variables 1"
    s1: Stationary "Stationary Solver 1"
      p1: Parametric | pname = freq; plistarr = range(100,5,4500); punit = Hz; pcontinuationmode = no
      fc1: FullyCoupled | linsolver = d1
      d1: Direct "Suggested Direct Solver (solid)" | linsolver = pardiso; pivotperturb = 1.0E-9

Datasets
  dset3: Solution | solution = sol3

Plots
  pg4: PlotGroup3D "Stress (solid) 1" | data = dset3
    vol1: Volume | data = dset3; expr = solid.disp; descr = Displacement magnitude
      def: Deform "Deformation" | expr = {u, v, w}; descr = Displacement field
  pg5: PlotGroup3D "Boundary Loads (solid) 1" | data = dset3
    arws1: ArrowSurface "Boundary Load 1" | expr = {solid.bndl1.F_Ax, solid.bndl1.F_Ay, solid.bndl1.F_Az}
      col: Color "Color Expression" | expr = solid.bndl1.F_A_Mag
      def: Deform "Deformation" | expr = {u, v, w}; descr = Displacement field
    arws2: ArrowSurface "Boundary Load 2" | expr = {solid.bndl2.F_Ax, solid.bndl2.F_Ay, solid.bndl2.F_Az}
      col: Color "Color Expression" | expr = solid.bndl2.F_A_Mag
      def: Deform "Deformation" | expr = {u, v, w}; descr = Displacement field
    surf1: Surface "Gray Surfaces" | expr = 1
      def: Deform "Deformation" | expr = {u, v, w}; descr = Displacement field
      sel1: Selection on boundaries 1, 2, 6-8, 11-13, 15, 16, 19-23, 25-28, 31, 33, 34, 40-43, 45
      tran1: Transparency | transparency = 0.8
  pg6: PlotGroup1D "1D Plot Group 6" | data = dset3
    ptgr1: PointGraph on points 52 | data = dset3; expr = solid.disp
    ptgr2: PointGraph | expr = solid.disp
  pg7: PlotGroup1D "1D Plot amplitude" | data = dset3
    ptgr1: PointGraph "X component amplitude" on points 52
      expr = solid.uAmpX
      descr = Displacement amplitude, X component
    ptgr5: PointGraph "Y component amplitude" on points 52
      expr = solid.uAmpY
      descr = Displacement amplitude, Y component
    ptgr3: PointGraph "Z component amplitude" on points 52
      expr = solid.uAmpZ
      descr = Displacement amplitude, Z component
  pg8: PlotGroup1D "1D Plot phase" | data = dset3; touchpostshow = on
    ptgr4: PointGraph "X component phase" on points 52 | expr = solid.uPhaseX; descr = Displacement phase, X component
    ptgr2: PointGraph "Y component phase" on points 52 | expr = solid.uPhaseY; descr = Displacement phase, Y component
    ptgr5: PointGraph "z component phase" on points 52 | expr = solid.uPhaseZ; descr = Displacement phase, Z component

Exports
  anim1: Animation | target = player; sweeptype = dde
  plot1: Plot "solid.disp" | filename = FRFmodel30t2_displ.csv
  plot2: Plot "xmag" | filename = FRFmodel30t2_xmag.csv
  plot3: Plot "ymag" | filename = FRFmodel30t2_ymag.csv
  plot4: Plot "zmag" | filename = FRFmodel30t2_zmag.csv
  plot5: Plot "xphase" | filename = FRFmodel30t2_xphase.csv
  plot6: Plot "yphase" | filename = FRFmodel30t2_yphase.csv
  plot7: Plot "zphase" | filename = FRFmodel30t2_zphase.csv