// COMSOL Multiphysics 6.0.0.405 model "Static_0.mph"
// Outline of the model tree

Parameters
  rho = 700
  E_xx = 1e10
  E_yy = 2e9
  E_zz = 1.2e9
  mu_xy = 0.375
  mu_xz = 0.48
  mu_yz = 0.47
  G_xy = 1600e9
  G_xz = 1600e9
  G_yz = 720e9
  x_plane = 0.02

Selections
  sel1: Explicit "feet surfaces" on no boundaries
  sel2: Explicit "force surface" on no boundaries

Common definitions
  mpf1: ParticipationFactors

Geometry
  geom1 "Geometry 1" (3D, length unit m)
    imp1: Import | type = cad; filename = Bridge Models\Param cello bridge - 0.sat
    wp1: WorkPlane "IV string inner" | quickplane = yz; quickx = x_plane; unite = on
    wp2: WorkPlane "IV string outer" | quickplane = yz; quickx = x_plane + 0.0015; unite = on
    wp3: WorkPlane "III string inner" | quickplane = yz; quickx = x_plane/3; unite = on
    wp4: WorkPlane "III string outer" | quickplane = yz; quickx = x_plane/3+0.0015; unite = on
    wp5: WorkPlane "II string inner" | quickplane = yz; quickx = -x_plane/3; unite = on
    wp6: WorkPlane "II string outer" | quickplane = yz; quickx = -(x_plane/3+0.0015); unite = on
    wp7: WorkPlane "I string inner" | quickplane = yz; quickx = -(x_plane); unite = on
    wp8: WorkPlane "I string outer" | quickplane = yz; quickx = -(x_plane+0.0015); unite = on
    parf1: PartitionFaces | face = imp1(1) boundaries 12; partitionwith = workplane; workplane = wp1
    parf2: PartitionFaces | face = parf1(1) boundaries 28; partitionwith = workplane; workplane = wp2
    parf3: PartitionFaces | face = parf2(1) boundaries 12; partitionwith = workplane; workplane = wp3
    parf4: PartitionFaces | face = parf3(1) boundaries 23; partitionwith = workplane; workplane = wp4
    parf5: PartitionFaces | face = parf4(1) boundaries 12; partitionwith = workplane; workplane = wp5
    parf6: PartitionFaces | face = parf5(1) boundaries 12; partitionwith = workplane; workplane = wp6
    parf7: PartitionFaces | face = parf6(1) boundaries 12; partitionwith = workplane; workplane = wp7
    parf8: PartitionFaces | face = parf7(1) boundaries 12; partitionwith = workplane; workplane = wp8
    fin: Finalize "Form Union"

Physics
  solid: SolidMechanics on all domains
    dependent variable u = {u, v, w}
    lemm1: LinearElasticModel "Linear Elastic Material 1" (default)
      SolidModel = Orthotropic
      Evector_mat = userdef
      Evector = {E_xx, E_yy, E_zz}
      nuvector_mat = userdef
      nuvector = {mu_xy, mu_yz, mu_xz}
      Gvector_mat = userdef
      Gvector = {G_xy, G_yz, G_xz}
      rho_mat = userdef
      rho = rho
    free1: Free (default)
    init1: init "Initial Values 1" (default)
    fix1: Fixed "Fixed Constraint 1" on boundaries 2, 32
    bndl1: BoundaryLoad on boundaries 17, 20, 27, 34 | LoadType = TotalForce; Ftot = {0, -1, 0}; FperArea = {0, -1, 0}

Mesh
  mesh1 "Mesh 1" (physics-controlled)
    size: MeshSizeDefault | hauto = 2

Studies
  std2 "Study 2"
    stat: Stationary

Solver configurations
  sol2 "Solution 2" (study std2)
    v1: Variables "Dependent Variables 1"
    s1: Stationary "Stationary Solver 1"
      fc1: FullyCoupled | linsolver = d1
      d1: Direct "Suggested Direct Solver (solid)" | linsolver = pardiso; pivotperturb = 1.0E-9

Datasets
  dset2: Solution | solution = sol2

Plots
  pg1: PlotGroup3D "Displacement (x)" | data = dset2
    surf1: Surface | expr = abs(u)
      def: Deform "Deformation" | expr = {u, v, w}; descr = Displacement field
  pg4: PlotGroup3D "Displacement (y)" | data = dset2
    surf1: Surface | expr = v
      def: Deform "Deformation" | expr = {u, v, w}; descr = Displacement field
  pg3: PlotGroup3D "Boundary Loads (solid)" | data = dset2
    arws1: ArrowSurface "Boundary Load 1" | expr = {solid.bndl1.F_Ax, solid.bndl1.F_Ay, solid.bndl1.F_Az}
      col: Color "Color Expression" | expr = solid.bndl1.F_A_Mag
      def: Deform "Deformation" | expr = {u, v, w}; descr = Displacement field
    surf1: Surface "Gray Surfaces" | expr = 1
      def: Deform "Deformation" | expr = {u, v, w}; descr = Displacement field
      sel1: Selection
      tran1: Transparency | transparency = 0.8

Exports
  data1: Data
    data = dset2
    expr = {u, v, w}
    unit = {m, m, m}
    descr = {"Displacement field, X component", "Displacement field, Y component", "Displacement field, Z component"}